// SBML level 3 version 1

model model_0()
  // MAPK
  // model units - substance: nmol, time: s, extent: nmol

  // Compartments:
  compartment cell = 1 L;

  // Species:
  species ras_gtp in cell = 64.5; ras_gtp is "Ras-GTP";
  species sos_ras_gtp in cell = 0; sos_ras_gtp is "SOS-Ras-GTP";
  species raf in cell = 81; raf is "Raf";
  species raf_p in cell = 19; raf_p is "Raf-P";
  species mek in cell = 270; mek is "Mek";
  species mek_p in cell = 21.5; mek_p is "Mek-P";
  species mek_pp in cell = 8.5; mek_pp is "Mek-PP";
  species mapk in cell = 286; mapk is "Mapk";
  species mapk_p in cell = 10.5; mapk_p is "Mapk-P";
  species mapk_pp in cell = 3.5; mapk_pp is "Mapk-PP";
  species total_mek_p in cell; total_mek_p is "Total MEK activated";
  species total_mapk_activated in cell; total_mapk_activated is "Total MAPK activated";

  // Parameters:
  // 0.0046
  raf_activation_cat = 0.0611 s_1; raf_activation_cat is "Raf activation catalytic constant";
  raf_activation_mich = 0.0362 nmol_per_liter; raf_activation_mich is "Raf activation michaelis constant";
  raf_inactivation_cat = 0.25 nmol_per_liter_per_seconds; raf_inactivation_cat is "Raf inactivation catalytic";
  raf_inactivation_michaelis = 8 nmol_per_liter; raf_inactivation_michaelis is "Raf inactivation michaelis constant";
  mek_activation_cat = 0.025 s_1; mek_activation_cat is "Mek activation catalytic constant";
  mek_activation_michaelis = 15 nmol_per_liter; mek_activation_michaelis is "Mek activation michaelis";
  mek_inactivation_cat = 0.75 nmol_per_liter_per_seconds; mek_inactivation_cat is "Mek inactivation catalytic constant";
  mek_inactivation_mich = 15 nmol_per_liter; mek_inactivation_mich is "Mek inactivation michaelis constant";
  mapk_activation_cat = 0.025 s_1; mapk_activation_cat is "Mapk activation catalytic constant";
  mapk_activation_mich = 15 nmol_per_liter; mapk_activation_mich is "Mapk activation michaelis constant";
  mapk_inactivation_cat = 0.5 nmol_per_liter_per_seconds; mapk_inactivation_cat is "Mapk inactivation catalytic constant";
  mapk_inactivation_mich = 15 nmol_per_liter; mapk_inactivation_mich is "Mapk inactivation michaelis constant";
  parameter_31 = 1.64 s_1; parameter_31 is "Raf inactivation by ERK catalytic constant";
  parameter_32 = 7.9 nmol_per_liter; parameter_32 is "Raf inactivation by ERK michaelis constant";

  // Assignment rules:
  total_mek_p := mek_p + mek_pp;
  total_mapk_activated := mapk_p + mapk_pp;

  // Reactions:
  Raf_activation_by_Ras_GTP: raf => raf_p; raf*ras_gtp*cell*raf_activation_cat/(raf + raf_activation_mich); Raf_activation_by_Ras_GTP is "Raf activation by Ras-GTP";  // modifiers: ras_gtp
  Raf_inactivation: raf_p => raf; raf_p*cell*raf_inactivation_cat/(raf_p + raf_inactivation_michaelis);
  Mek_activation_1: mek => mek_p; mek*raf_p*cell*mek_activation_cat/(mek + mek_activation_michaelis);  // modifiers: raf_p
  Mek_activation_2: mek_p => mek_pp; mek_p*raf_p*cell*mek_activation_cat/(mek_p + mek_activation_michaelis);  // modifiers: raf_p
  Mek_inactivation_1: mek_p => mek; mek_p*cell*mek_inactivation_cat/(mek_p + mek_inactivation_mich);
  Mek_inactivation_2: mek_pp => mek_p; mek_pp*cell*mek_inactivation_cat/(mek_pp + mek_inactivation_mich);
  Mapk_activation_1: mapk => mapk_p; mapk*mek_pp*cell*mapk_activation_cat/(mapk + mapk_activation_mich);  // modifiers: mek_pp
  Mapk_activation_2: mapk_p => mapk_pp; mapk_p*mek_pp*cell*mapk_activation_cat/(mapk_p + mapk_activation_mich);  // modifiers: mek_pp
  Mapk_inactivation_1: mapk_p => mapk; mapk_p*cell*mapk_inactivation_cat/(mapk_p + mapk_inactivation_mich);
  Mapk_inactivation_2: mapk_pp => mapk_p; mapk_pp*cell*mapk_inactivation_cat/(mapk_pp + mapk_inactivation_mich);
  RAF_inactivation_by_mapk: raf_p => raf; mapk_pp*raf_p*cell*parameter_31/(raf_p + parameter_32); RAF_inactivation_by_mapk is "Ras inactivation by Mapk";  // modifiers: mapk_pp

  // Unit definitions:
  unit L = 10 litre; L is "Litre";
  unit nmol = 1e-9 mole; nmol is "Nanomoles";
  unit nmol_per_liter = 1e-9 mole / (10 litre); nmol_per_liter is "Nanomoles per litre";
  unit s = 10 second; s is "Seconds";
  unit s_1 = 1 / (10 second); s_1 is "per Seconds";
  unit nmol_1 = 1 / (1e-9 mole); nmol_1 is "per Nanomoles";
  unit dim_less = 10 dimensionless; dim_less is "Dimensionless";
  unit per_nmol_per_seconds = 1 / (1e-9 mole * 10 second); per_nmol_per_seconds is "per Nanomoles per Seconds";
  unit mnol_per_seconds = 1e-9 mole / (10 second); mnol_per_seconds is "Nanomoles per seconds";
  unit nmol_per_liter_per_seconds = 1e-9 mole / (10 litre * 10 second); nmol_per_liter_per_seconds is "Nanomoles per litre per seconds";
  unit per_nmol_per_liter_per_seconds = 10 litre / (1e-9 mole * 10 second); per_nmol_per_liter_per_seconds is "per Nanomoles per liter per Seconds";
end
