// SBML level 3 version 1

model model_0()
  // SOS-Ras-MAPK with n17
  // model units - substance: nmol, time: s, extent: nmol

  // Compartments:
  compartment cell = 1 L;

  // Species:
  species sos in cell = 0; sos is "SOS";
  species ras_gdp in cell = 265.5; ras_gdp is "Ras-GDP";
  species ras_gtp in cell = 64.5; ras_gtp is "Ras-GTP";
  species sos_ras_gdp in cell = 0; sos_ras_gdp is "SOS-Ras-GDP";
  species sos_ras_gtp in cell = 0; sos_ras_gtp is "SOS-Ras-GTP";
  species gap in cell = 125; gap is "GAP";
  species total_ras_gtp in cell; total_ras_gtp is "Total Ras-GTP";
  species total_ras_gdp in cell; total_ras_gdp is "Total Ras-GDP";
  species total_sos in cell; total_sos is "Total SOS";
  species gef in cell = 100; gef is "GEF";
  species sos_i in cell = 330; sos_i is "SOS_inactive";
  species fgf2 in cell = 0; fgf2 is "FGF2";
  species ras_n17 in cell = 0; ras_n17 is "Ras-N17";
  species sos_ras_n17 in cell = 0; sos_ras_n17 is "SOS-Ras-N17";
  species raf in cell = 81; raf is "Raf";
  species raf_p in cell = 19; raf_p is "Raf-P";
  species mek in cell = 270; mek is "Mek";
  species mek_p in cell = 21.5; mek_p is "Mek-P";
  species mek_pp in cell = 8.5; mek_pp is "Mek-PP";
  species mapk in cell = 286; mapk is "Mapk";
  species mapk_p in cell = 10.5; mapk_p is "Mapk-P";
  species mapk_pp in cell = 3.5; mapk_pp is "Mapk-PP";
  species total_mek_p in cell; total_mek_p is "Total MEK activated";
  species total_mapk_activated in cell; total_mapk_activated is "Total MAPK activated";
  species gef_rasn17 in cell = 0; gef_rasn17 is "GEF-RasN17";

  // Parameters:
  sos_ras_gdp_comp = 0.00011255 per_nmol_per_liter_per_seconds; sos_ras_gdp_comp is "SOS-Ras-GDP complexification constant";
  sos_ras_gdp_decomp = 3 s_1; sos_ras_gdp_decomp is "SOS-Ras-GDP decomplexification constant";
  parameter_3 = 0.003 s_1; parameter_3 is "Ras activation by SOS-Ras-GDP catalytic constant";
  parameter_4 = 14600 nmol_per_liter; parameter_4 is "Ras activation by SOS-Ras-GDP michaelis constant";
  parameter_5 = 20 s_1; parameter_5 is "Ras activation by SOS-Ras-GTP catalytic constant";
  parameter_6 = 2750 nmol_per_liter; parameter_6 is "Ras activation by SOS-Ras-GTP michaelis constant";
  ras_inactivation_by_gap_cat = 0.1 s_1; ras_inactivation_by_gap_cat is "Ras inactivation by GAP catalytic constant";
  ras_inactivation_by_gap_mich = 178 nmol_per_liter; ras_inactivation_by_gap_mich is "Ras inactivation by GAP michaelis constant";
  sos_ras_gtp_comp = 0.0001 per_nmol_per_liter_per_seconds; sos_ras_gtp_comp is "SOS-Ras-GTP complexification constant";
  sos_ras_gtp_decomp = 0.4 s_1; sos_ras_gtp_decomp is "SOS-Ras-GTP decomplexification constant";
  ras_activation_by_gef_cat = 0.01 s_1; ras_activation_by_gef_cat is "Ras activation by GEF catalytic constant";
  ras_activation_by_gef_mich = 0.0085 nmol_per_liter; ras_activation_by_gef_mich is "Ras activation by GEF michaelis constant";
  SOS_activation_by_FGF2 = 5.44e-5 per_nmol_per_liter_per_seconds;
  // 170
  sos_inactivation_by_ras_cat = 0 s_1; sos_inactivation_by_ras_cat is "SOS deactivation by Ras-GTP catalytic constant";
  parameter_18 = 3360000 nmol_per_liter; parameter_18 is "SOS deactivation by Ras-GTP michaelis constant";
  sos_ras_n17_comp = 1.5e-5 per_nmol_per_liter_per_seconds; sos_ras_n17_comp is "SOS-Ras-N17 complexification";
  sos_ras_n17_decomp = 1.92e-5 s_1; sos_ras_n17_decomp is "SOS-Ras-N17 decomplexification";
  // 0.0046
  raf_activation_cat = 0.0611 s_1; raf_activation_cat is "Raf activation catalytic constant";
  raf_activation_mich = 0.0362 nmol_per_liter; raf_activation_mich is "Raf activation michaelis constant";
  raf_inactivation_cat = 0.25 nmol_per_liter_per_seconds; raf_inactivation_cat is "Raf inactivation catalytic";
  raf_inactivation_michaelis = 8 nmol_per_liter; raf_inactivation_michaelis is "Raf inactivation michaelis constant";
  mek_activation_cat = 0.025 s_1; mek_activation_cat is "Mek activation catalytic constant";
  mek_activation_michaelis = 15 nmol_per_liter; mek_activation_michaelis is "Mek activation michaelis";
  mek_inactivation_cat = 0.75 nmol_per_liter_per_seconds; mek_inactivation_cat is "Mek inactivation catalytic constant";
  mek_inactivation_mich = 15 nmol_per_liter; mek_inactivation_mich is "Mek inactivation michaelis constant";
  mapk_activation_cat = 0.025 s_1; mapk_activation_cat is "Mapk activation catalytic constant";
  mapk_activation_mich = 15 nmol_per_liter; mapk_activation_mich is "Mapk activation michaelis constant";
  mapk_inactivation_cat = 0.5 nmol_per_liter_per_seconds; mapk_inactivation_cat is "Mapk inactivation catalytic constant";
  mapk_inactivation_mich = 15 nmol_per_liter; mapk_inactivation_mich is "Mapk inactivation michaelis constant";
  sos_inactivation_mapk_cat = 25.5 s_1; sos_inactivation_mapk_cat is "SOS inactivation by Mapk catalytic constant";
  sos_inactivation_mapk_michaelis = 230000 nmol_per_liter; sos_inactivation_mapk_michaelis is "SOS inactivation by Mapk michaelis constant";
  parameter_31 = 1.64 s_1; parameter_31 is "Raf inactivation by ERK catalytic constant";
  parameter_32 = 7.9 nmol_per_liter; parameter_32 is "Raf inactivation by ERK michaelis constant";
  gef_rasn17_comp = 0.002 per_nmol_per_liter_per_seconds; gef_rasn17_comp is "GEF Ras-N17 complexification";
  gef_rasn17_decomp = 1.92e-5 s_1; gef_rasn17_decomp is "GEF Ras-N17 decomplexification";

  // Assignment rules:
  total_ras_gtp := ras_gtp + sos_ras_gtp;
  total_ras_gdp := ras_gdp + sos_ras_gdp;
  total_sos := sos + sos_i + sos_ras_gdp + sos_ras_gtp + sos_ras_n17;
  total_mek_p := mek_p + mek_pp;
  total_mapk_activated := mapk_p + mapk_pp;

  // Reactions:
  SOS_Ras_GDP_Complexification: sos + ras_gdp -> sos_ras_gdp; cell*(-1*sos_ras_gdp*sos_ras_gdp_decomp + ras_gdp*sos*sos_ras_gdp_comp); SOS_Ras_GDP_Complexification is "SOS-Ras-GDP Complexification";
  SOS_Ras_GTP_Complexification: sos + ras_gtp -> sos_ras_gtp; cell*(-1*sos_ras_gtp*sos_ras_gtp_decomp + ras_gtp*sos*sos_ras_gtp_comp); SOS_Ras_GTP_Complexification is "SOS-Ras-GTP Complexification";
  Ras_activation_by_SOS_Ras_GDP: ras_gdp => ras_gtp; ras_gdp*sos_ras_gdp*cell*parameter_3/(ras_gdp + parameter_4); Ras_activation_by_SOS_Ras_GDP is "Ras activation by SOS-Ras-GDP";  // modifiers: sos_ras_gdp
  Ras_activation_by_SOS_Ras_GTP: ras_gdp => ras_gtp; ras_gdp*sos_ras_gtp*cell*parameter_5/(ras_gdp + parameter_6); Ras_activation_by_SOS_Ras_GTP is "Ras activation by SOS-Ras-GTP";  // modifiers: sos_ras_gtp
  Ras_inactivation_by_GAP: ras_gtp => ras_gdp; gap*ras_gtp*cell*ras_inactivation_by_gap_cat/(ras_gtp + ras_inactivation_by_gap_mich);  // modifiers: gap
  Ras_activation_by_GEF: ras_gdp => ras_gtp; gef*ras_gdp*cell*ras_activation_by_gef_cat/(ras_gdp + ras_activation_by_gef_mich);  // modifiers: gef
  SOS_activation: fgf2 + sos_i => sos; fgf2*sos_i*cell*SOS_activation_by_FGF2;
  SOS_inactivation_by_Ras_GTP: sos => sos_i; ras_gtp*sos*cell*sos_inactivation_by_ras_cat/(sos + parameter_18); SOS_inactivation_by_Ras_GTP is "SOS inactivation by Ras-GTP";  // modifiers: ras_gtp
  SOS_Ras_N17_complexification: sos + ras_n17 -> sos_ras_n17; cell*(-1*sos_ras_n17*sos_ras_n17_decomp + ras_n17*sos*sos_ras_n17_comp); SOS_Ras_N17_complexification is "SOS-Ras-N17 complexification";
  Raf_activation_by_Ras_GTP: raf => raf_p; raf*ras_gtp*cell*raf_activation_cat/(raf + raf_activation_mich); Raf_activation_by_Ras_GTP is "Raf activation by Ras-GTP";  // modifiers: ras_gtp
  Raf_inactivation: raf_p => raf; raf_p*cell*raf_inactivation_cat/(raf_p + raf_inactivation_michaelis);
  Mek_activation_1: mek => mek_p; mek*raf_p*cell*mek_activation_cat/(mek + mek_activation_michaelis);  // modifiers: raf_p
  Mek_activation_2: mek_p => mek_pp; mek_p*raf_p*cell*mek_activation_cat/(mek_p + mek_activation_michaelis);  // modifiers: raf_p
  Mek_inactivation_1: mek_p => mek; mek_p*cell*mek_inactivation_cat/(mek_p + mek_inactivation_mich);
  Mek_inactivation_2: mek_pp => mek_p; mek_pp*cell*mek_inactivation_cat/(mek_pp + mek_inactivation_mich);
  Mapk_activation_1: mapk => mapk_p; mapk*mek_pp*cell*mapk_activation_cat/(mapk + mapk_activation_mich);  // modifiers: mek_pp
  Mapk_activation_2: mapk_p => mapk_pp; mapk_p*mek_pp*cell*mapk_activation_cat/(mapk_p + mapk_activation_mich);  // modifiers: mek_pp
  Mapk_inactivation_1: mapk_p => mapk; mapk_p*cell*mapk_inactivation_cat/(mapk_p + mapk_inactivation_mich);
  Mapk_inactivation_2: mapk_pp => mapk_p; mapk_pp*cell*mapk_inactivation_cat/(mapk_pp + mapk_inactivation_mich);
  SOS_inactivation_by_Erk: sos => sos_i; mapk_pp*sos*cell*sos_inactivation_mapk_cat/(sos + sos_inactivation_mapk_michaelis);  // modifiers: mapk_pp
  RAF_inactivation_by_mapk: raf_p => raf; mapk_pp*raf_p*cell*parameter_31/(raf_p + parameter_32); RAF_inactivation_by_mapk is "Ras inactivation by Mapk";  // modifiers: mapk_pp
  GEF___Ras_N17_complexification: gef + ras_n17 -> gef_rasn17; cell*(-1*gef_rasn17*gef_rasn17_decomp + gef*ras_n17*gef_rasn17_comp); GEF___Ras_N17_complexification is "GEF - Ras-N17 complexification";

  // Unit definitions:
  unit L = 10 litre; L is "Litre";
  unit nmol = 1e-9 mole; nmol is "Nanomoles";
  unit nmol_per_liter = 1e-9 mole / (10 litre); nmol_per_liter is "Nanomoles per litre";
  unit s = 10 second; s is "Seconds";
  unit s_1 = 1 / (10 second); s_1 is "per Seconds";
  unit nmol_1 = 1 / (1e-9 mole); nmol_1 is "per Nanomoles";
  unit dim_less = 10 dimensionless; dim_less is "Dimensionless";
  unit per_nmol_per_seconds = 1 / (1e-9 mole * 10 second); per_nmol_per_seconds is "per Nanomoles per Seconds";
  unit mnol_per_seconds = 1e-9 mole / (10 second); mnol_per_seconds is "Nanomoles per seconds";
  unit nmol_per_liter_per_seconds = 1e-9 mole / (10 litre * 10 second); nmol_per_liter_per_seconds is "Nanomoles per litre per seconds";
  unit per_nmol_per_liter_per_seconds = 10 litre / (1e-9 mole * 10 second); per_nmol_per_liter_per_seconds is "per Nanomoles per liter per Seconds";
end
