// SBML level 2 version 4

model Enzymatic_reaction()

  // Compartments:
  compartment cell = 1;

  // Species:
  species substrate in cell = 12; substrate is "Substrate";
  species enzyme in cell = 10; enzyme is "Enzyme";
  species complexES in cell = 0; complexES is "ES-complex";
  species product in cell = 0; product is "Product";

  // Parameters:
  kf = 1; kf is "Binding rate";
  kr = 1; kr is "Unbinding rate";
  kcat = 1; kcat is "Catalytic rate";

  // Reactions:
  binding: substrate + enzyme -> complexES; cell*(-1*complexES*kr + enzyme*substrate*kf); binding is "Enzyme-Substrate complexification";
  catalysis: complexES => enzyme + product; complexES*cell*kcat; catalysis is "Catalytic reaction";

  // Unit definitions:
  unit substance = 1e-6 mole; substance is "micromoles";
  unit uM_per_second = 1e-6 mole / (litre * second);
  unit sec_inv = 1 / second; sec_inv is "s−1";
  unit uM_inv_sec_inv = litre / (1e-6 mole * second); uM_inv_sec_inv is "μM-1s-1";
  unit uM = 1e-6 mole / litre; uM is "μM";
end
