// SBML level 3 version 1

model model_0()
  // Tyson minimal oscillator
  // model units - substance: nanomoles, time: seconds, extent: nanomoles

  // Compartments:
  // cell
  compartment cell = 1;

  // Species:
  species cyclin_cdk in cell = 0.25; cyclin_cdk is "Cyclin-CDK";
  species cyclin_cdk_p in cell = 0; cyclin_cdk_p is "Cyclin-CDK activated";

  // Parameters:
  k1_aa = 0.015; k1_aa is "Synthesis rate";
  k4 = 0.018; k4 is "Cyclin-CDK activation rate";
  k4prime = 180; k4prime is "Cyclin-CDK induced activation rate";
  k6 = 1; k6 is "Degradation rate";

  // Reactions:
  cyclin_cdk_synthesis: => cyclin_cdk; k1_aa; cyclin_cdk_synthesis is "Cyclin-CDK synthesis";
  cyclin_cdk_activation: cyclin_cdk => cyclin_cdk_p; cyclin_cdk*cell*k4; cyclin_cdk_activation is "Cyclin-CDK activation";
  cyclin_cdk_induced_activation: cyclin_cdk => cyclin_cdk_p; cyclin_cdk*cell*k4prime*cyclin_cdk_p^2; cyclin_cdk_induced_activation is "Cyclin-CDK induced activation";
  cyclin_cdk_degradation: cyclin_cdk_p => ; cyclin_cdk_p*cell*k6; cyclin_cdk_degradation is "Cyclin-CDK degradation";

  // Unit definitions:
  unit nanomoles = 1e-9 mole;
  unit seconds = 10 second;
  unit nanomolars = 1e-9 mole / (10 litre);
  unit litres = 10 litre;
end
